t1 := 48
t2 := 6
t3 := 0.5
t4 := 1
l1 := 1/t1 = 0.0208333
l2 := 1/t3 = 2
l3 := 1/(t2 - t3 - t4) = 0.222222
l4 := 1/t4 = 1
P1 := 0
P2 := 0
P3 := 0
P4 := 0
Given
l4*P4 == l1*P1
l1*P1 == l2*P2
l2*P2 == l3*P3
P1 + P2 + P3 + P4 == 1
F := Find(P1, P2, P3, P4)
[R1; R2; R3; R4] := F = [0.888889; 0.00925926; 0.0833333; 0.0185185]
